(1)
g = 9.80665 m/s^2
M := 10 kg, 11 kg .. 20 kg
x0 := 0 m
Fg(M) := M*g
k := 200 N/m
x(M) := g/k*M + x0
# [plot: x(M) vs M]
(2)
y0 := 0
g = 9.80665 m/s^2
v0 := 0, 0.1 .. 30
tmax(v0) := v0/g
y(v0) := y0 + 0.5*v0^2/g
# [plot: y(v0) vs v0]
